*
* DEBUT DU FICHIER MAILLAGE-CUBE.DGIBI
*
TITR ' PREMIER MAILLAGE' ;
OPTION DIMENSION 3 ELEMENT CUB8 ;
*
* POINTS
*
P1 = 0. 0. 0. ;
P2 = 10. 0. 0. ;
P3 = 10. 10. 0. ;
P4 = 0. 10. 0. ;
*
* LIGNES
*
P1P2 = P1 DROITE 10 P2 ;
P2P3 = P2 DROITE 10 P3 ;
P3P4 = P3 DROITE 10 P4 ;
P4P1 = P4 DROITE 10 P1 ;
*
* SURFACE
*
SURF1 = DALLER P1P2 P2P3 P3P4 P4P1 ;
*
* VOLUME
*
VOL1 = SURF1 VOLUME 10 TRANSLATION (0. 0. 10.) ;
*
* TRACAGE
*
TRACER SURF1 QUALIFICATION ;
TRACER CACHER VOL1 ;
*
*FIN DU FICHIER
FIN ;
